*Heading
** Job name: Job-1 Model name: Model-1
** Generated by: Abaqus/CAE 2017
*Preprint, echo=NO, model=NO, history=NO, contact=NO
**
** PARTS
**
*Part, name=Part-1
*End Part
**
**
** ASSEMBLY
**
*Assembly, name=Assembly
**
*Instance, name=Part-1-1, part=Part-1
*Node
      1,           0., 0.00999999978
      2,           0., 0.00899999961
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*Element, type=CPS4
 1,  1,  2, 13, 12
 2,  2,  3, 14, 13
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*Nset, nset=Set-1, generate
  1,  44,   1
*Elset, elset=Set-1, generate
  1,  30,   1
*Nset, nset=NODE9
 1,
** Section: Section-1
*Solid Section, elset=Set-1, material=Material-1
,
*End Instance
**
*Nset, nset=Set-1, instance=Part-1-1
 11,
*Nset, nset=Set-2, instance=Part-1-1, generate
 11,  44,  11
*Elset, elset=Set-2, instance=Part-1-1, generate
 10,  30,  10
*Nset, nset=Set-3, instance=Part-1-1, generate
  1,  11,   1
*Elset, elset=Set-3, instance=Part-1-1, generate
  1,  10,   1
*Nset, nset=Set-4, instance=Part-1-1, generate
  1,  34,  11
*Elset, elset=Set-4, instance=Part-1-1, generate
  1,  21,  10
*Nset, nset=Set-6, instance=Part-1-1
 11,
*Nset, nset=Set-7, instance=Part-1-1, generate
 11,  44,  11
*Elset, elset=Set-7, instance=Part-1-1, generate
 10,  30,  10
*Nset, nset=Set-8, instance=Part-1-1, generate
  1,  11,   1
*Elset, elset=Set-8, instance=Part-1-1, generate
  1,  10,   1
*Nset, nset=Set-9, instance=Part-1-1, generate
  1,  34,  11
*Elset, elset=Set-9, instance=Part-1-1, generate
  1,  21,  10
*End Assembly
**
** MATERIALS
**
*Material, name=Material-1
*Hyperelastic, n=2, moduli=LONG TERM
-3.93817432e+05,  1.24877154e+06,  8.20055634e+05, -2.96896103e+05,  -1.07306690e+06,  1.71214286e-07,  0.00000000e+00
*Viscoelastic, time=PRONY
 0.0936453,     0., 3.6084
 0.0968891,     0., 54.504
** ----------------------------------------------------------------
**
** STEP: Step-1
**
*Step, name=Step-1, nlgeom=YES, inc=1000000
*Static
0.01, 40., 1e-06, 1.
**
** BOUNDARY CONDITIONS
**
** Name: BC-1 Type: Symmetry/Antisymmetry/Encastre
*Boundary
Set-6, PINNED
** Name: BC-2 Type: Displacement/Rotation
*Boundary
Set-7, 2, 2
** Name: BC-3 Type: Displacement/Rotation
*Boundary
Set-8, 1, 1
** Name: BC-4 Type: Displacement/Rotation
*Boundary
Set-9, 2, 2, 0.00474
**
** OUTPUT REQUESTS
**
*Restart, write, frequency=0
**
** FIELD OUTPUT: F-Output-1
**
*Output, field
*Node Output
CF, RF, U
*Element Output, directions=YES
E, LE, S, VEEQ
**
** HISTORY OUTPUT: H-Output-1
**
*Output, history, variable=PRESELECT
*End Step
